*Heading
** Job name: Job-1 Model name: Model-1
** Generated by: Abaqus/CAE 6.12-3
*Preprint, echo=NO, model=NO, history=NO, contact=NO
**
** PARTS
**
*Part, name=Union-part
*End Part
**
**
** ASSEMBLY
**
*Assembly, name=Assembly
**
*Instance, name=Union-part-1, part=Union-part
*Node
      1,   47.7523117,   59.2000008
      2,   47.7523117,   58.2000008
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*Element, type=CPS3
 1, 11496,  1403,  1402
 2, 11496,     1,  1404
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*Nset, nset=Set-1
     1,     2,     3,     4,     5,     6
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*Elset, elset=Set-1, generate
 16717,  81919,      1
*Nset, nset=Set-2
     1,     2,     3,     4,     5,     6
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*Elset, elset=Set-2, generate
     1,  16716,      1
** Section: Section-2
*Solid Section, elset=Set-2, material=Material-2-Inclusion
,
** Section: Section-1
*Solid Section, elset=Set-1, material=Material-1-Matrix
,
*End Instance
**
*Nset, nset=Set-3, instance=Union-part-1
  1394,  1395, 11149, 11150, 11151, 11152
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*Elset, elset=Set-3, instance=Union-part-1
 20735, 35724, 35926, 35971, 36149, 36151
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*Elset, elset=_Surf-1_S3, internal, instance=Union-part-1
 16726, 16757, 16817, 16982, 16989, 17089, 17096, 17106, 17143
*Elset, elset=_Surf-1_S2, internal, instance=Union-part-1
 16779, 16816, 16833, 16837, 16841, 16993
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*Elset, elset=_Surf-1_S1, internal, instance=Union-part-1
 39836, 39837
*Surface, type=ELEMENT, name=Surf-1
_Surf-1_S3, S3
_Surf-1_S2, S2
_Surf-1_S1, S1
*End Assembly
**
** MATERIALS
**
*Material, name=Material-1-Matrix
*Elastic
10., 0.2
*Material, name=Material-2-Inclusion
*Elastic
10000., 0.33
** ----------------------------------------------------------------
**
** STEP: Step-1
**
*Step, name=Step-1
*Static
1., 1., 1e-05, 1.
**
** BOUNDARY CONDITIONS
**
** Name: BC-1 Type: Displacement/Rotation
*Boundary
Set-3, 1, 1
Set-3, 2, 2
Set-3, 6, 6
**
** LOADS
**
** Name: Load-1   Type: Surface traction
*Dsload
Surf-1, TRSHR, 4., 0., 1., 0.
**
** OUTPUT REQUESTS
**
*Restart, write, frequency=0
**
** FIELD OUTPUT: F-Output-1
**
*Output, field, variable=PRESELECT
**
** HISTORY OUTPUT: H-Output-1
**
*Output, history, variable=PRESELECT
*End Step
