*Heading
** Job name: Job-1 Model name: Model-1
** Generated by: Abaqus/CAE 6.12-3
*Preprint, echo=NO, model=NO, history=NO, contact=NO
**
** PARTS
**
*Part, name=Beam-part
*End Part
**
**
** ASSEMBLY
**
*Assembly, name=Assembly
**
*Instance, name=Beam-part-1, part=Beam-part
*Node
      1,           0.,           5.
      2,           0.,   4.61538458
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*Element, type=CPE4
  1,   1,   2,  16,  15
  2,   2,   3,  17,  16
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*Nset, nset=Set-1, generate
   1,  714,    1
*Elset, elset=Set-1, generate
   1,  650,    1
** Section: Beam-section
*Solid Section, elset=Set-1, material=Beam-material
,
*End Instance
**
*Nset, nset=Set-3, instance=Beam-part-1, generate
  1,  14,   1
*Elset, elset=Set-3, instance=Beam-part-1, generate
  1,  13,   1
*Elset, elset=_Surf-1_S3, internal, instance=Beam-part-1, generate
 638,  650,    1
*Surface, type=ELEMENT, name=Surf-1
_Surf-1_S3, S3
*End Assembly
**
** MATERIALS
**
*Material, name=Beam-material
*Hyperelastic, neo hooke
 192.31, 0.0024
**
** BOUNDARY CONDITIONS
**
** Name: BC-1 Type: Displacement/Rotation
*Boundary
Set-3, 1, 1
Set-3, 2, 2
Set-3, 6, 6
** ----------------------------------------------------------------
**
** STEP: Step-1
**
*Step, name=Step-1, nlgeom=YES
*Static
1., 1., 1e-05, 1.
**
** LOADS
**
** Name: Load-1   Type: Surface traction
*Dsload
Surf-1, TRSHR, 0.5, 0., -1., 0.
**
** OUTPUT REQUESTS
**
*Restart, write, frequency=0
**
** FIELD OUTPUT: F-Output-1
**
*Output, field, variable=PRESELECT
**
** HISTORY OUTPUT: H-Output-1
**
*Output, history, variable=PRESELECT
*End Step
