*Heading
** Job name: Job-1 Model name: Model-1
** Generated by: Abaqus/CAE 6.12-3
*Preprint, echo=NO, model=NO, history=NO, contact=NO
**
** PARTS
**
*Part, name=Union-part
*Node
      1,   19.8761559,         4.75
      2,   19.8761559,         4.25
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*Element, type=CPE3
 1, 3451,  410,  409
 2, 3451,  411,  410
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*Nset, nset=Set-1
     1,     2,     3,     4,     5,     6
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*Elset, elset=Set-1, generate
  4801,  22900,      1
*Nset, nset=Set-2
    1,    2,    3,    4,    5,    6
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*Elset, elset=Set-2, generate
    1,  4800,     1
** Section: Inclusion-section
*Solid Section, elset=Set-2, material=Inclusion-material
,
** Section: Beam-section
*Solid Section, elset=Set-1, material=Beam-material
,
*End Part
**
**
** ASSEMBLY
**
*Assembly, name=Assembly
**
*Instance, name=Union-part-1, part=Union-part
*End Instance
**
*Nset, nset=Set-1, instance=Union-part-1
  401,  402, 3205, 3206, 3207, 3208
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*Elset, elset=Set-1, instance=Union-part-1
 10384, 10408, 10417, 10419, 10423, 10437
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*Elset, elset=_Surf-1_S2, internal, instance=Union-part-1
  4801,  5012,  5014,  5027, 11186, 11192, 11193, 14508, 16568, 19586, 22883
*Elset, elset=_Surf-1_S3, internal, instance=Union-part-1
  4832,  4838,  4876,  4905,  5025,  5035,  5080, 12976
*Elset, elset=_Surf-1_S1, internal, instance=Union-part-1
 10499, 10503, 11187, 11188, 11189, 11190
*Surface, type=ELEMENT, name=Surf-1
_Surf-1_S2, S2
_Surf-1_S3, S3
_Surf-1_S1, S1
*End Assembly
**
** MATERIALS
**
*Material, name=Beam-material
*Hyperelastic, neo hooke
 17.857, 0.012
*Material, name=Inclusion-material
*Hyperelastic, neo hooke
 192.31, 0.0024
** ----------------------------------------------------------------
**
** STEP: Step-1
**
*Step, name=Step-1, nlgeom=YES
*Static
1., 1., 1e-05, 1.
**
** BOUNDARY CONDITIONS
**
** Name: Fixed-Left Type: Displacement/Rotation
*Boundary
Set-1, 1, 1
Set-1, 2, 2
Set-1, 6, 6
**
** LOADS
**
** Name: Load-right   Type: Surface traction
*Dsload
Surf-1, TRSHR, 0.5, 0., -1., 0.
**
** OUTPUT REQUESTS
**
*Restart, write, frequency=0
**
** FIELD OUTPUT: F-Output-1
**
*Output, field, variable=PRESELECT
**
** HISTORY OUTPUT: H-Output-1
**
*Output, history, variable=PRESELECT
*End Step
