*Heading
** Job name: Job-7 Model name: Model-1
** Generated by: Abaqus/CAE 6.12-3
*Preprint, echo=NO, model=NO, history=NO, contact=NO
**
** PARTS
**
*Part, name=Union-part
*End Part
**
**
** ASSEMBLY
**
*Assembly, name=Assembly
**
*Instance, name=Union-part-1, part=Union-part
*Node
      1,         19.5,   4.75231314
      2,         19.5,   3.75231314
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*Element, type=CPS4
1,  108,  107, 1051,  109
2, 1051,  105,    1,  111
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*Nset, nset=Set-1
    1,    2,    3,    4,    5,    6
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*Elset, elset=Set-1, generate
  401,  3024,     1
*Nset, nset=Set-2
    1,    2,    3,    4,    5,    6
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*Elset, elset=Set-2, generate
   1,  400,    1
** Section: Inclusion-section
*Solid Section, elset=Set-2, material=Inclusion-material
1.,
** Section: Beam-section
*Solid Section, elset=Set-1, material=Beam-material
1.,
*End Instance
**
*Nset, nset=Set-1, instance=Union-part-1
 101, 102, 805, 806, 807, 808
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*Elset, elset=Set-1, instance=Union-part-1
 1561, 1572, 1580, 1585, 1586, 1595
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*Nset, nset=Set-7, instance=Union-part-1
 104,
*Nset, nset=Set-20, instance=Union-part-1
 103, 104, 928, 929, 930, 931
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*Elset, elset=Set-20, instance=Union-part-1
  406,  411,  425,  428,  430,  441
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*Elset, elset=_Surf-1_S1, internal, instance=Union-part-1
  406,  425, 1725, 1728, 1990, 1996, 2003, 2445, 2839
*Elset, elset=_Surf-1_S3, internal, instance=Union-part-1
  411,  428,  430,  441,  471, 1606, 1733, 2006, 2432, 2837, 2840
*Elset, elset=_Surf-1_S4, internal, instance=Union-part-1
 1726, 1734, 1988, 2856
*Elset, elset=_Surf-1_S2, internal, instance=Union-part-1
 2427,
*Surface, type=ELEMENT, name=Surf-1
_Surf-1_S1, S1
_Surf-1_S3, S3
_Surf-1_S4, S4
_Surf-1_S2, S2
*Elset, elset=_Surf-2_S1, internal, instance=Union-part-1
  406,  425, 1725, 1728, 1990, 1996, 2003, 2445, 2839
*Elset, elset=_Surf-2_S3, internal, instance=Union-part-1
  411,  428,  430,  441,  471, 1606, 1733, 2006, 2432, 2837, 2840
*Elset, elset=_Surf-2_S4, internal, instance=Union-part-1
 1726, 1734, 1988, 2856
*Elset, elset=_Surf-2_S2, internal, instance=Union-part-1
 2427,
*Surface, type=ELEMENT, name=Surf-2
_Surf-2_S1, S1
_Surf-2_S3, S3
_Surf-2_S4, S4
_Surf-2_S2, S2
*End Assembly
**
** MATERIALS
**
*Material, name=Beam-material
*Elastic
1000., 0.3
*Material, name=Inclusion-material
*Elastic
100000., 0.3
** ----------------------------------------------------------------
**
** STEP: Step-1
**
*Step, name=Step-1
*Static
1., 1., 1e-05, 1.
**
** BOUNDARY CONDITIONS
**
** Name: BC-1 Type: Displacement/Rotation
*Boundary
Set-1, 1, 1
Set-1, 2, 2
Set-1, 6, 6
** Name: BC-2 Type: Displacement/Rotation
*Boundary
Set-20, 1, 1
Set-20, 2, 2
Set-20, 6, 6
**
** LOADS
**
** Name: Load-1   Type: Surface traction
*Dsload
Surf-2, TRSHR, 0.25, 0., -1., 0.
**
** OUTPUT REQUESTS
**
*Restart, write, frequency=0
**
** FIELD OUTPUT: F-Output-1
**
*Output, field, variable=PRESELECT
**
** HISTORY OUTPUT: H-Output-1
**
*Output, history, variable=PRESELECT
*End Step
