*Heading
** Job name: TimoBeam_mesh3_T3 Model name: TimoBeam
** Generated by: Abaqus/CAE 6.12-3
*Preprint, echo=NO, model=NO, history=NO, contact=NO
**
** PARTS
**
*Part, name=Part-1
*Node
      1,           0.,           2.
      2,           0.,         1.75
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*Element, type=CPS3
   1,    1,    2,   19
   2,   19,   18,    1
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*Nset, nset=Set-1, generate
    1,  1105,     1
*Elset, elset=Set-1, generate
    1,  2048,     1
** Section: Section-1
*Solid Section, elset=Set-1, material=Material-1
,
*End Part
**
**
** ASSEMBLY
**
*Assembly, name=Assembly
**
*Instance, name=Part-1-1, part=Part-1
*End Instance
**
*Nset, nset=Set-1, instance=Part-1-1, generate
  1,  17,   1
*Elset, elset=Set-1, instance=Part-1-1, generate
  1,  31,   2
*Nset, nset=Set-2, instance=Part-1-1, generate
  1,  17,   1
*Elset, elset=Set-2, instance=Part-1-1, generate
  1,  31,   2
*End Assembly
*Amplitude, name=Amp-1
             1.,              1.,              2.,              2.
**
** MATERIALS
**
*Material, name=Material-1
*Elastic
 1e+06, 0.3
** ----------------------------------------------------------------
**
** STEP: LoadingStep
**
*Step, name=LoadingStep
*Static
1., 1., 1e-05, 1.
**
** OUTPUT REQUESTS
**
*Restart, write, frequency=0
**
** FIELD OUTPUT: F-Output-1
**
*Output, field, variable=PRESELECT
**
** HISTORY OUTPUT: H-Output-1
**
*Output, history, variable=PRESELECT
*End Step
