*Heading
** Job name: Job-1 Model name: Model-1
** Generated by: Abaqus/CAE 6.12-3
*Preprint, echo=NO, model=NO, history=NO, contact=NO
**
** PARTS
**
*Part, name=beam-part
*End Part
**
**
** ASSEMBLY
**
*Assembly, name=Assembly
**
*Instance, name=beam-part-1, part=beam-part
*Node
      1,           0., 0.00100000005
      2,           0.,           0.
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*Element, type=CPE4
 1,  1,  2,  4,  3
 2,  3,  4,  6,  5
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*Nset, nset=Set-1, generate
  1,  82,   1
*Elset, elset=Set-1, generate
  1,  40,   1
** Section: beam-section
*Solid Section, elset=Set-1, material=Material-1
,
*End Instance
**
*Nset, nset=Set-1, instance=beam-part-1
 1, 2
*Elset, elset=Set-1, instance=beam-part-1
 1,
*Elset, elset=_Surf-1_S4, internal, instance=beam-part-1, generate
  1,  40,   1
*Surface, type=ELEMENT, name=Surf-1
_Surf-1_S4, S4
*End Assembly
**
** MATERIALS
**
*Material, name=Material-1
*Elastic
 7e+10, 0.33
**
** BOUNDARY CONDITIONS
**
** Name: BC-1 Type: Displacement/Rotation
*Boundary
Set-1, 1, 1
Set-1, 2, 2
Set-1, 6, 6
** ----------------------------------------------------------------
**
** STEP: Step-1
**
*Step, name=Step-1
*Static
1., 1., 1e-05, 1.
**
** LOADS
**
** Name: Load-1   Type: Surface traction
*Dsload
Surf-1, TRVEC, 500., 0., -1., 0.
**
** OUTPUT REQUESTS
**
*Restart, write, frequency=0
**
** FIELD OUTPUT: F-Output-1
**
*Output, field, variable=PRESELECT
**
** HISTORY OUTPUT: H-Output-1
**
*Output, history, variable=PRESELECT
*End Step
